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/batch
! ANSYS input file written by Workbench version 2024 R2
! File used for geometry attach: C:\Users\nahid\Documents\beam_files\dp0\SYS-2\DM\SYS-2.scdoc
/title,beam--Static Structural (B5)
/COM,/COM,     ANSYSMotion, 2024.2
/com,--- Data in consistent NMM units. See Solving Units in the help system for more information.
/units,MPA
/prep7
! Turn off shape checking because checks already performed inside WB mesher.
! See help system for more information.
SHPP,OFF,,NOWARN
etcon,set             ! allow ANSYS to choose best KEYOP's for 180x elements, resets any applicable keyopt to MAPDL defaults
/com,*********** Nodes for the whole assembly ***********
nblock,3,,62
(1i9,3e20.9e3)
        1     1.000000000E+02     5.000000000E+02     0.000000000E+00
        2     1.000000000E+02     5.000000000E+02     1.000000000E+02
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-1
/com,*********** Elements for Body 1 'SYS-2\Solid' ***********
et,1,185
eblock,19,solid,,108
(19i9)
        1        1        1        1        0        0        0        0        8        0        1       14       52       15       15       16       16       16       16
        1        1        1        1        0        0        0        0        8        0        2       40       52       41       41       50       50       50       50
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-1
/com,*********** Send User Defined Coordinate System(s) ***********
csys,0
toffst,273.15,      ! Temperature offset from absolute zero
/com,*********** Set Reference Temperature ***********
tref,22.
/com,*********** Send Materials ***********
Temperature = 'TEMP' ! Temperature
MP,DENS,1,7.85e-09,	! tonne mm^-3
MP,ALPX,1,1.2e-05,	! C^-1
MP,C,1,434000000,	! mm^2 s^-2 C^-1
MP,KXX,1,60.5,	! tonne mm s^-3 C^-1
MP,RSVX,1,0.00017,	! ohm mm
MP,EX,1,200000,	! tonne s^-2 mm^-1
MP,NUXY,1,0.3,
MP,MURX,1,10000,

!************************* Model Summary ********************
!SYS-2\Solid,	Structural Steel,	matid,	1
!************************* End Model Summary ********************
/com,*********** Send Named Selection as Node Component ***********
CMBLOCK,F_FIX   ,NODE,        8
(8i10)
         4        14        15        27        37        40        50        52

/com,*********** Send Named Selection as Node Component ***********
CMBLOCK,F_LOAD  ,NODE,        8
(8i10)
         1         2         3        25        26        38        39        51

CMBLOCK,_CM34_FIXEDSU,NODE,        8
(8i10)
         4        14        15        27        37        40        50        52

/com,*********** Fixed Supports ***********
CMBLOCK,_FIXEDSU,NODE,        8
(8i10)
         4        14        15        27        37        40        50        52

cmsel,s,_FIXEDSU
d,all,all
nsel,all
/com,*********** Define Force Without Surface Effect Elements "Force" ***********
local,12,0,0.,0.,0.,0.,0.,0.
csys,0
CMBLOCK,_CM53_1 ,ELEM,        2
(8i10)
        13       108
CMBLOCK,_CM53_2 ,ELEM,        3
(8i10)
        14        82        85
CMBLOCK,_CM53_5 ,ELEM,        1
(8i10)
       106

*DIM,_loadvari53x,TABLE,3,1,1,TIME, , , 0
! Time values
*TAXIS,_loadvari53x(1),1,0.,1.,2.
! Load values
_loadvari53x(1,1,1) = 0.
_loadvari53x(2,1,1) = 0.
_loadvari53x(3,1,1) = 0.


*DIM,_loadvari53y,TABLE,3,1,1,TIME, , , 0
! Time values
*TAXIS,_loadvari53y(1),1,0.,1.,2.
! Load values
_loadvari53y(1,1,1) = 0.
_loadvari53y(2,1,1) = 0.
_loadvari53y(3,1,1) = 1.


*DIM,_loadvari53z,TABLE,3,1,1,TIME, , , 0
! Time values
*TAXIS,_loadvari53z(1),1,0.,1.,2.
! Load values
_loadvari53z(1,1,1) = 0.
_loadvari53z(2,1,1) = -1.
_loadvari53z(3,1,1) = 0.


fini
/com,****************************************************************************
/com,*************************    SOLUTION       ********************************
/com,****************************************************************************
/solu
antype,0                   ! static analysis
_thickRatio=  0     ! Ratio of thick parts in the model
eqsl,sparse,,,,,1
cntr,print,1               ! print out contact info and also make no initial contact an error
nldiag,cont,iter           ! print out contact info each equilibrium iteration
rescontrol,linear,last           ! Turn on restart files due to future eigen analysis intent
/com,****************************************************
/com,******************* SOLVE FOR LS 1 OF 2 ****************
/com,*********** Set Force Without Surface Effect Elements "Force" ***********
sfco,1,0,12,,,,,1   ! set and send X component tables
sfe,_CM53_1,1,pres,1,%_loadvari53x%
sfe,_CM53_2,2,pres,1,%_loadvari53x%
sfe,_CM53_5,5,pres,1,%_loadvari53x%
sfco,1,1,12,,,,,1   ! set and send Y component tables
sfe,_CM53_1,1,pres,1,%_loadvari53y%
sfe,_CM53_2,2,pres,1,%_loadvari53y%
sfe,_CM53_5,5,pres,1,%_loadvari53y%
sfco,1,2,12,,,,,1   ! set and send Z component tables
sfe,_CM53_1,1,pres,1,%_loadvari53z%
sfe,_CM53_2,2,pres,1,%_loadvari53z%
sfe,_CM53_5,5,pres,1,%_loadvari53z%
nsel,all
esel,all
sfco,none		! resets the sfcontrol
autots,on                   ! User turned on automatic time stepping
nsub,1,10,1,OFF
time,1.
outres,erase
outres,all,none
outres,nsol,all,
outres,rsol,all
outres,eangl,all
outres,etmp,all
outres,veng,all
outres,strs,all,
outres,epel,all,
outres,eppl,all,
outres,cont,all,
outres,misc,all,
! *********** WB SOLVE COMMAND ***********
! check interactive state
*get,ANSINTER_,active,,int
*if,ANSINTER_,ne,0,then
/eof
*endif
solve
/com *************** Write FE CONNECTORS *********
CEWRITE,file,ce,,INTE
/com,****************************************************
/com,*************** FINISHED SOLVE FOR LS 1 *************
/com,****************************************************
/com,******************* SOLVE FOR LS 2 OF 2 ****************
nsub,1,1,1
time,2.
outres,erase
outres,all,none
outres,nsol,all,
outres,rsol,all
outres,eangl,all
outres,etmp,all
outres,veng,all
outres,strs,all,
outres,epel,all,
outres,eppl,all,
outres,cont,all,
outres,misc,all,
solve
/com,****************************************************
/com,*************** FINISHED SOLVE FOR LS 2 *************
save,file,db
*get,_NSOLTHREADS,active,0,ntfs
*get,_NSOLPROCESSES,active,0,npfs
/post1
fini
